# Car stability by braking - calculation
# Base data
m_. := 1200 kg
v := 60*km/hr
r := 38 m
r_I := 1 m
I := 1/2*m_.*r_I^2
I = 600 kg*m^2
# Geometric data
l_. := 4 m
l_1 := 1.5 m
l_2 := l_. - l_1
w_. := 1.5 m
w_1 := 0.5 m
w_2 := w_. - w_1
h_. := 1.5 m
h_1 := 0.5 m
# Other data
g := 9.81*m/s^2
# Friction function by vertical force
μ_A := 1.2
μ_B := 0.3
μ_C := 0.3
μ_D := 10000
μ(F_y) := μ_A - μ_C/(F_y/(N*μ_D) + μ_B)
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# Angular velocity
ω := v/r
ω = 0.438596 1/s
# Gravity
G_. := m_.*g
G_. = 11.772 kN
# Centripetal force
F_cp := m_.*v^2/r
F_cp = 8771.93 N
# Calculating front/rear distribution of cetripetal force (x axis). A simple beam calculation
F_cp.AB_ := 0 N
F_cp.DC_ := 0 N
Given
F_cp.AB_ + F_cp.DC_ == F_cp
F_cp.AB_*l_1 == F_cp.DC_*l_2
[F_cp.AB; F_cp.DC] := Find(F_cp.AB_, F_cp.DC_)
# Front centripetal force | Rear centripetal force
F_cp.AB = 5.48246 kN
F_cp.DC = 3.28947 kN
# Calculating front/rear distribution of gravity (y axis). A simple beam calculation
G_AB_ := 0 N
G_DC_ := 0 N
Given
G_AB_ + G_DC_ == G_.
G_AB_*l_1 == G_DC_*l_2
[G_AB; G_DC] := Find(G_AB_, G_DC_)
# Front gravity | Rear gravity
G_AB = 7.3575 kN
G_DC = 4.4145 kN
# Rate of front x/y forces for ideal (non-slip) situation
fg_AB := F_cp.AB/G_AB
fg_AB = 0.745152
fg_AB.α := acot(fg_AB)
fg_AB.α = 53.3083 deg
# Calculating right/left distribution of gravity on front.
G_A_ := 0 N
G_B_ := 0 N
Given
G_A_ + G_B_ == G_AB
G_A_*w_1 == G_B_*w_2
[G_A; G_B] := Find(G_A_, G_B_)
# Right/front gravity | Left/front gravity
G_A = 4.905 kN
G_B = 2.4525 kN
# Calculation max. friction forces (x axis)
F_s.A.max := G_A*μ(G_A)
F_s.A.max = 4.02452 kN
F_s.B.max := G_B*μ(G_B)
F_s.B.max = 1.59362 kN
# Required right/front friction force for stability (ideal)
F_A.x.0 := G_A*fg_AB
F_A.x.0 = 3.65497 kN
# Required left/front friction force for stability (ideal)
F_B.x.1 := G_B*fg_AB
F_B.x.1 = 1.82749 kN
# Limiting the left/front (internal side) friction force to max. friction force
F_B.x := min(F_B.x.1, F_s.B.max)
F_B.x = 1.59362 kN
# Required right/front (external side) friction force for stability
F_A.x.1 := F_cp.AB - F_B.x
F_A.x.1 = 3.88884 kN
# Limiting the right/front friction force to max. friction force
F_A.x := min(F_A.x.1, F_s.A.max)
F_A.x = 3.88884 kN
# Remained force for unstable moving (front)
F_AB.x := F_cp.AB - (F_A.x + F_B.x)
F_AB.x = 0 kN
# Rate of rear x/y forces for ideal (non-slip) situation
fg_DC := F_cp.DC/G_DC
fg_DC = 0.745152
fg_DC.α := acot(fg_DC)
fg_DC.α = 53.3083 deg
# Calculating right/left distribution of gravity on rear.
G_D_ := 0 N
G_C_ := 0 N
Given
G_D_ + G_C_ == G_DC
G_D_*w_1 == G_C_*w_2
[G_C; G_D] := Find(G_C_, G_D_)
# Right/rear gravity | Left/rear gravity
G_D = 2.943 kN
G_C = 1.4715 kN
# Calculation max. friction forces (x axis)
F_s.D.max := G_D*μ(G_D)
F_s.D.max = 2.04599 kN
F_s.C.max := G_C*μ(G_C)
F_s.C.max = 0.778547 kN
# Required right/rear friction force for stability (ideal)
F_D.x.0 := G_D*fg_DC
F_D.x.0 = 2.19298 kN
# Required left/rear friction force for stability (ideal)
F_C.x.1 := G_C*fg_DC
F_C.x.1 = 1.09649 kN
# Limiting the left/rear (internal side) friction force to max. friction force
F_C.x := min(F_C.x.1, F_s.C.max)
F_C.x = 0.778547 kN
# Required right/rear (external side) friction force for stability
F_D.x.1 := F_cp.DC - F_C.x
F_D.x.1 = 2.51093 kN
# Limiting the right/rear friction force to max. friction force
F_D.x := min(F_D.x.1, F_s.D.max)
F_D.x = 2.04599 kN
# Remained force for unstable moving (rear)
F_DC.x := F_cp.DC - (F_D.x + F_C.x)
F_DC.x = 0.46494 kN
# Remained force on x axis
F_x := F_AB.x + F_DC.x
F_x = 0.46494 kN
# Acceleration on r
a_r := F_x/m_.
a_r = 0.38745 m/s^2
# Rotating torque
T_y := F_DC.x*l_2 - F_AB.x*l_1
T_y = 1.16235 kN*m
# Required braking force
F_b := T_y/l_1
F_b = 0.774899 kN
# Angular acceleration
α := T_y/I
α = 1.93725 1/s^2
